#-----------------------------------------------------------------------------------
# NANOPOLY - POLYMER NANOCOMPOSITE SIMULATION FILE
# Full project files can be found at: https://github.com/aravinthen/nanoPoly
#-----------------------------------------------------------------------------------
# FILENAME: int_settings.in
# DATE: 2021-10-27
# OVERVIEW:
#    Number of polymer chains:       10
#    Number of bonded crosslinks:    0
#    Number of unbonded crosslinks:  0
#    Number of grafted chains:       0
#    Nanostructure:                  None
#-----------------------------------------------------------------------------------

variable structure index int_structure.in
variable simulation index int_settings.in

# Initialization settings
units              lj
boundary           p p p
atom_style         bond
log                log.${simulation}.txt

# read data from object into file
read_data          ${structure}

# define interactions
neighbor      4.0 multi
neigh_modify  every 10 one 10000
pair_style    lj/cut 1.5
pair_coeff    1 1 0.2 0.1
pair_style    lj/cut 1.5
pair_coeff    1 2 0.2 0.1
pair_style    lj/cut 1.5
pair_coeff    2 2 0.5 0.1

bond_style    fene
special_bonds fene
bond_coeff    1 30 1.5 1.0 1.0
compute         1 all stress/atom NULL

#---------------------------------------------------------------------------------------------------
# POTENTIAL MODIFICATION STAGE
#---------------------------------------------------------------------------------------------------
pair_style    lj/cut/soft 1.0 1.0 1.5
pair_coeff    1 1 0.2 0.145 0.3
pair_style    lj/cut/soft 1.0 1.0 1.5
pair_coeff    2 2 0.5 0.145 0.3
pair_style    lj/cut/soft 1.0 1.0 1.5
pair_coeff    1 2 0.2 0.145 0.3
dump            1 all cfg 100 dump.int_settings.in_*.cfg mass type xs ys zs fx fy fz
velocity        all create 0.0 22150
fix             1 all nve/limit 1.5
fix             2 all langevin 0.0 0.0 10 22150
thermo_style    custom step temp press pe ke
thermo          100
run             100
unfix 1
unfix 2
undump 1

pair_style    lj/cut/soft 1.0 1.0 1.5
pair_coeff    1 1 0.2 0.19 0.3
pair_style    lj/cut/soft 1.0 1.0 1.5
pair_coeff    2 2 0.5 0.19 0.3
pair_style    lj/cut/soft 1.0 1.0 1.5
pair_coeff    1 2 0.2 0.19 0.3
dump            1 all cfg 100 dump.int_settings.in_*.cfg mass type xs ys zs fx fy fz
velocity        all create 0.0 22150
fix             1 all nve/limit 1.5
fix             2 all langevin 0.0 0.0 10 22150
thermo_style    custom step temp press pe ke
thermo          100
run             100
unfix 1
unfix 2
undump 1

pair_style    lj/cut/soft 1.0 1.0 1.5
pair_coeff    1 1 0.2 0.235 0.3
pair_style    lj/cut/soft 1.0 1.0 1.5
pair_coeff    2 2 0.5 0.235 0.3
pair_style    lj/cut/soft 1.0 1.0 1.5
pair_coeff    1 2 0.2 0.235 0.3
dump            1 all cfg 100 dump.int_settings.in_*.cfg mass type xs ys zs fx fy fz
velocity        all create 0.0 22150
fix             1 all nve/limit 1.5
fix             2 all langevin 0.0 0.0 10 22150
thermo_style    custom step temp press pe ke
thermo          100
run             100
unfix 1
unfix 2
undump 1

pair_style    lj/cut/soft 1.0 1.0 1.5
pair_coeff    1 1 0.2 0.28 0.3
pair_style    lj/cut/soft 1.0 1.0 1.5
pair_coeff    2 2 0.5 0.28 0.3
pair_style    lj/cut/soft 1.0 1.0 1.5
pair_coeff    1 2 0.2 0.28 0.3
dump            1 all cfg 100 dump.int_settings.in_*.cfg mass type xs ys zs fx fy fz
velocity        all create 0.0 22150
fix             1 all nve/limit 1.5
fix             2 all langevin 0.0 0.0 10 22150
thermo_style    custom step temp press pe ke
thermo          100
run             100
unfix 1
unfix 2
undump 1

pair_style    lj/cut/soft 1.0 1.0 1.5
pair_coeff    1 1 0.2 0.325 0.3
pair_style    lj/cut/soft 1.0 1.0 1.5
pair_coeff    2 2 0.5 0.325 0.3
pair_style    lj/cut/soft 1.0 1.0 1.5
pair_coeff    1 2 0.2 0.325 0.3
dump            1 all cfg 100 dump.int_settings.in_*.cfg mass type xs ys zs fx fy fz
velocity        all create 0.0 22150
fix             1 all nve/limit 1.5
fix             2 all langevin 0.0 0.0 10 22150
thermo_style    custom step temp press pe ke
thermo          100
run             100
unfix 1
unfix 2
undump 1

pair_style    lj/cut/soft 1.0 1.0 1.5
pair_coeff    1 1 0.2 0.37 0.3
pair_style    lj/cut/soft 1.0 1.0 1.5
pair_coeff    2 2 0.5 0.37 0.3
pair_style    lj/cut/soft 1.0 1.0 1.5
pair_coeff    1 2 0.2 0.37 0.3
dump            1 all cfg 100 dump.int_settings.in_*.cfg mass type xs ys zs fx fy fz
velocity        all create 0.0 22150
fix             1 all nve/limit 1.5
fix             2 all langevin 0.0 0.0 10 22150
thermo_style    custom step temp press pe ke
thermo          100
run             100
unfix 1
unfix 2
undump 1

pair_style    lj/cut/soft 1.0 1.0 1.5
pair_coeff    1 1 0.2 0.415 0.3
pair_style    lj/cut/soft 1.0 1.0 1.5
pair_coeff    2 2 0.5 0.415 0.3
pair_style    lj/cut/soft 1.0 1.0 1.5
pair_coeff    1 2 0.2 0.415 0.3
dump            1 all cfg 100 dump.int_settings.in_*.cfg mass type xs ys zs fx fy fz
velocity        all create 0.0 22150
fix             1 all nve/limit 1.5
fix             2 all langevin 0.0 0.0 10 22150
thermo_style    custom step temp press pe ke
thermo          100
run             100
unfix 1
unfix 2
undump 1

pair_style    lj/cut/soft 1.0 1.0 1.5
pair_coeff    1 1 0.2 0.46 0.3
pair_style    lj/cut/soft 1.0 1.0 1.5
pair_coeff    2 2 0.5 0.46 0.3
pair_style    lj/cut/soft 1.0 1.0 1.5
pair_coeff    1 2 0.2 0.46 0.3
dump            1 all cfg 100 dump.int_settings.in_*.cfg mass type xs ys zs fx fy fz
velocity        all create 0.0 22150
fix             1 all nve/limit 1.5
fix             2 all langevin 0.0 0.0 10 22150
thermo_style    custom step temp press pe ke
thermo          100
run             100
unfix 1
unfix 2
undump 1

pair_style    lj/cut/soft 1.0 1.0 1.5
pair_coeff    1 1 0.2 0.505 0.3
pair_style    lj/cut/soft 1.0 1.0 1.5
pair_coeff    2 2 0.5 0.505 0.3
pair_style    lj/cut/soft 1.0 1.0 1.5
pair_coeff    1 2 0.2 0.505 0.3
dump            1 all cfg 100 dump.int_settings.in_*.cfg mass type xs ys zs fx fy fz
velocity        all create 0.0 22150
fix             1 all nve/limit 1.5
fix             2 all langevin 0.0 0.0 10 22150
thermo_style    custom step temp press pe ke
thermo          100
run             100
unfix 1
unfix 2
undump 1

pair_style    lj/cut/soft 1.0 1.0 1.5
pair_coeff    1 1 0.2 0.55 0.3
pair_style    lj/cut/soft 1.0 1.0 1.5
pair_coeff    2 2 0.5 0.55 0.3
pair_style    lj/cut/soft 1.0 1.0 1.5
pair_coeff    1 2 0.2 0.55 0.3
dump            1 all cfg 100 dump.int_settings.in_*.cfg mass type xs ys zs fx fy fz
velocity        all create 0.0 22150
fix             1 all nve/limit 1.5
fix             2 all langevin 0.0 0.0 10 22150
thermo_style    custom step temp press pe ke
thermo          100
run             100
unfix 1
unfix 2
undump 1

pair_style    lj/cut/soft 1.0 1.0 1.5
pair_coeff    1 1 0.2 0.595 0.3
pair_style    lj/cut/soft 1.0 1.0 1.5
pair_coeff    2 2 0.5 0.595 0.3
pair_style    lj/cut/soft 1.0 1.0 1.5
pair_coeff    1 2 0.2 0.595 0.3
dump            1 all cfg 100 dump.int_settings.in_*.cfg mass type xs ys zs fx fy fz
velocity        all create 0.0 22150
fix             1 all nve/limit 1.5
fix             2 all langevin 0.0 0.0 10 22150
thermo_style    custom step temp press pe ke
thermo          100
run             100
unfix 1
unfix 2
undump 1

pair_style    lj/cut/soft 1.0 1.0 1.5
pair_coeff    1 1 0.2 0.64 0.3
pair_style    lj/cut/soft 1.0 1.0 1.5
pair_coeff    2 2 0.5 0.64 0.3
pair_style    lj/cut/soft 1.0 1.0 1.5
pair_coeff    1 2 0.2 0.64 0.3
dump            1 all cfg 100 dump.int_settings.in_*.cfg mass type xs ys zs fx fy fz
velocity        all create 0.0 22150
fix             1 all nve/limit 1.5
fix             2 all langevin 0.0 0.0 10 22150
thermo_style    custom step temp press pe ke
thermo          100
run             100
unfix 1
unfix 2
undump 1

pair_style    lj/cut/soft 1.0 1.0 1.5
pair_coeff    1 1 0.2 0.685 0.3
pair_style    lj/cut/soft 1.0 1.0 1.5
pair_coeff    2 2 0.5 0.685 0.3
pair_style    lj/cut/soft 1.0 1.0 1.5
pair_coeff    1 2 0.2 0.685 0.3
dump            1 all cfg 100 dump.int_settings.in_*.cfg mass type xs ys zs fx fy fz
velocity        all create 0.0 22150
fix             1 all nve/limit 1.5
fix             2 all langevin 0.0 0.0 10 22150
thermo_style    custom step temp press pe ke
thermo          100
run             100
unfix 1
unfix 2
undump 1

pair_style    lj/cut/soft 1.0 1.0 1.5
pair_coeff    1 1 0.2 0.73 0.3
pair_style    lj/cut/soft 1.0 1.0 1.5
pair_coeff    2 2 0.5 0.73 0.3
pair_style    lj/cut/soft 1.0 1.0 1.5
pair_coeff    1 2 0.2 0.73 0.3
dump            1 all cfg 100 dump.int_settings.in_*.cfg mass type xs ys zs fx fy fz
velocity        all create 0.0 22150
fix             1 all nve/limit 1.5
fix             2 all langevin 0.0 0.0 10 22150
thermo_style    custom step temp press pe ke
thermo          100
run             100
unfix 1
unfix 2
undump 1

pair_style    lj/cut/soft 1.0 1.0 1.5
pair_coeff    1 1 0.2 0.775 0.3
pair_style    lj/cut/soft 1.0 1.0 1.5
pair_coeff    2 2 0.5 0.775 0.3
pair_style    lj/cut/soft 1.0 1.0 1.5
pair_coeff    1 2 0.2 0.775 0.3
dump            1 all cfg 100 dump.int_settings.in_*.cfg mass type xs ys zs fx fy fz
velocity        all create 0.0 22150
fix             1 all nve/limit 1.5
fix             2 all langevin 0.0 0.0 10 22150
thermo_style    custom step temp press pe ke
thermo          100
run             100
unfix 1
unfix 2
undump 1

pair_style    lj/cut/soft 1.0 1.0 1.5
pair_coeff    1 1 0.2 0.82 0.3
pair_style    lj/cut/soft 1.0 1.0 1.5
pair_coeff    2 2 0.5 0.82 0.3
pair_style    lj/cut/soft 1.0 1.0 1.5
pair_coeff    1 2 0.2 0.82 0.3
dump            1 all cfg 100 dump.int_settings.in_*.cfg mass type xs ys zs fx fy fz
velocity        all create 0.0 22150
fix             1 all nve/limit 1.5
fix             2 all langevin 0.0 0.0 10 22150
thermo_style    custom step temp press pe ke
thermo          100
run             100
unfix 1
unfix 2
undump 1

pair_style    lj/cut/soft 1.0 1.0 1.5
pair_coeff    1 1 0.2 0.865 0.3
pair_style    lj/cut/soft 1.0 1.0 1.5
pair_coeff    2 2 0.5 0.865 0.3
pair_style    lj/cut/soft 1.0 1.0 1.5
pair_coeff    1 2 0.2 0.865 0.3
dump            1 all cfg 100 dump.int_settings.in_*.cfg mass type xs ys zs fx fy fz
velocity        all create 0.0 22150
fix             1 all nve/limit 1.5
fix             2 all langevin 0.0 0.0 10 22150
thermo_style    custom step temp press pe ke
thermo          100
run             100
unfix 1
unfix 2
undump 1

pair_style    lj/cut/soft 1.0 1.0 1.5
pair_coeff    1 1 0.2 0.91 0.3
pair_style    lj/cut/soft 1.0 1.0 1.5
pair_coeff    2 2 0.5 0.91 0.3
pair_style    lj/cut/soft 1.0 1.0 1.5
pair_coeff    1 2 0.2 0.91 0.3
dump            1 all cfg 100 dump.int_settings.in_*.cfg mass type xs ys zs fx fy fz
velocity        all create 0.0 22150
fix             1 all nve/limit 1.5
fix             2 all langevin 0.0 0.0 10 22150
thermo_style    custom step temp press pe ke
thermo          100
run             100
unfix 1
unfix 2
undump 1

pair_style    lj/cut/soft 1.0 1.0 1.5
pair_coeff    1 1 0.2 0.955 0.3
pair_style    lj/cut/soft 1.0 1.0 1.5
pair_coeff    2 2 0.5 0.955 0.3
pair_style    lj/cut/soft 1.0 1.0 1.5
pair_coeff    1 2 0.2 0.955 0.3
dump            1 all cfg 100 dump.int_settings.in_*.cfg mass type xs ys zs fx fy fz
velocity        all create 0.0 22150
fix             1 all nve/limit 1.5
fix             2 all langevin 0.0 0.0 10 22150
thermo_style    custom step temp press pe ke
thermo          100
run             100
unfix 1
unfix 2
undump 1

pair_style    lj/cut/soft 1.0 1.0 1.5
pair_coeff    1 1 0.2 1.0 0.3
pair_style    lj/cut/soft 1.0 1.0 1.5
pair_coeff    2 2 0.5 1.0 0.3
pair_style    lj/cut/soft 1.0 1.0 1.5
pair_coeff    1 2 0.2 1.0 0.3
dump            1 all cfg 100 dump.int_settings.in_*.cfg mass type xs ys zs fx fy fz
velocity        all create 0.0 22150
fix             1 all nve/limit 1.5
fix             2 all langevin 0.0 0.0 10 22150
thermo_style    custom step temp press pe ke
thermo          100
run             100
unfix 1
unfix 2
undump 1


#---------------------------------------------------------------------------------------------------
# REDEFINE POTENTIAL
#---------------------------------------------------------------------------------------------------
pair_style    lj/cut 1.5
pair_coeff    1 1 0.2 1.0
pair_style    lj/cut 1.5
pair_coeff    1 2 0.2 1.0
pair_style    lj/cut 1.5
pair_coeff    2 2 0.5 1.0
min_style    cg
minimize     1e-05 1e-05 10000 100000

#---------------------------------------------------------------------------------------------------
# EQUILIBRATION STAGE 1
#---------------------------------------------------------------------------------------------------
dump            1 all cfg 100 dump.int_settings.in_*.cfg mass type xs ys zs fx fy fz c_1[1] c_1[2] c_1[3]
velocity        all create 0.0 48087
fix             1 all nve/limit 1.5
fix             2 all langevin 0.0 0.0 10.0 48087
thermo_style    custom step temp press pe ke
thermo          100
run             20000
unfix 1
unfix 2
undump 1
write_restart   restart.int_settings.in.polylattice1

#---------------------------------------------------------------------------------------------------
# EQUILIBRATION STAGE 2
#---------------------------------------------------------------------------------------------------
dump            1 all cfg 100 dump.int_settings.in_*.cfg mass type xs ys zs fx fy fz c_1[1] c_1[2] c_1[3]
velocity        all create 1.0 48087
fix             1 all nve/limit 1.5
fix             2 all langevin 1.0 1.0 10.0 48087
thermo_style    custom step temp press pe ke
thermo          100
run             20000
unfix 1
unfix 2
undump 1
write_restart   restart.int_settings.in.polylattice2

#---------------------------------------------------------------------------------------------------
# EQUILIBRATION STAGE 3
#---------------------------------------------------------------------------------------------------
dump            1 all cfg 100 dump.int_settings.in_*.cfg mass type xs ys zs fx fy fz c_1[1] c_1[2] c_1[3]
velocity        all create 0.5 48087
fix             1 all nve/limit 1.5
fix             2 all langevin 0.5 0.5 10.0 48087
thermo_style    custom step temp press pe ke
thermo          100
run             20000
unfix 1
unfix 2
undump 1
write_restart   restart.int_settings.in.polylattice3
