#-----------------------------------------------------------------------------------
# NANOPOLY - POLYMER NANOCOMPOSITE SIMULATION FILE
# Full project files can be found at: https://github.com/aravinthen/nanoPoly
#-----------------------------------------------------------------------------------
# FILENAME: test_settings70.in
# DATE: 2022-03-07
# OVERVIEW:
#    Number of polymer chains:       200
#    Number of bonded crosslinks:    0
#    Number of unbonded crosslinks:  0
#    Number of grafted chains:       100
#    Nanostructure:                  None
#-----------------------------------------------------------------------------------

variable structure index test_structure70.in
variable simulation index test_settings70.in

# Initialization settings
units              lj
boundary           p p p
atom_style         bond
log                log.${simulation}.txt

# read data from object into file
read_data          ${structure}

# define interactions
neighbor      4.0 multi
neigh_modify  every 10 one 10000
pair_style    lj/cut 1.5
pair_coeff    1 1 1.0 0.0
pair_style    lj/cut 1.5
pair_coeff    1 2 0.2 0.0
pair_style    lj/cut 1.5
pair_coeff    2 2 0.5 0.0

bond_style    fene
special_bonds fene
bond_coeff    1 30 1.5 1.0 1.0
compute         1 all stress/atom NULL
